# OpenSim document version 40000
AnalyzeTool Run_4_cycle1:
  model_file: Run_4_cycle1_model.osim
  replace_force_set: false
  results_directory: ./
  output_precision: 8
  initial_time: 0.107083
  final_time: 0.720083
  solve_for_equilibrium_for_auxiliary_states: false
  maximum_number_of_integrator_steps: 20000
  maximum_integrator_step_size: 1
  minimum_integrator_step_size: 1e-8
  integrator_error_tolerance: 1e-5
  external_loads_file: Run_4_cycle1_grf.xml
  states_file: Run_4_cycle1_states.sto
  lowpass_cutoff_frequency_for_coordinates: -1
  AnalysisSet Analyses:
    JointReaction JointReactions: start_time=-Inf end_time=Inf step_interval=1 in_degrees=true joint_names=ankle_r
        apply_on_bodies=parent express_in_frame=parent
    MuscleForceDirection: start_time=0 end_time=1 step_interval=1 in_degrees=true local_ref_system=true
        effective_attachments=false print_muscle_attachments=false body_names=tibia_r
